// COMSOL Multiphysics 6.2.0.260 model "fire_effects_heating.mph"
// Action on Structures Exposed to Fire — Heating Process
// This verification example from DIN EN 1991-1-2 models a heating process due to convection and radiation using a temperature-dependent thermal conductivity. The results are compared to the reference values from the European Standard.
// Outline of the model tree

Functions
  int1: Interpolation "Reference temperature" | funcname = Tref; table = {{0, 0}, {30, 36.9}, {60, 137.4}, {90, 244.6}, {120, 361.1}, {150, 466.2}, {180, 554.8}}; fununit = degC; argunit = min
  int2: Interpolation "Thermal conductivity" | funcname = k_lin; table = {{0, 1.5}, {200, 0.7}, {1000, 0.5}}; fununit = W/(m*K); argunit = degC

Common definitions
  ampr1: AmbientProperties | T_amb = 1000[degC]

Geometry
  geom1 "Geometry 1" (2D, length unit m)
    sq1: Square | size = 0.2
    pt1: Point | p = {0.1, .1}
    fin: Finalize "Form Union"

Materials
  mat1: Common "Material 1" on all domains
    def "Basic"
      thermalconductivity = k_lin(T)
      density = 2400
      heatcapacity = 1000

Physics
  ht: HeatTransfer "Heat Transfer in Solids" on all domains
    dependent variable T
    solid1: SolidHeatTransferModel "Solid 1" (default)
    init1: init "Initial Values 1" (default) | Tinit = Tref(0)
    ins1: ThermalInsulation (default)
    hf1: HeatFluxBoundary "Heat Flux 1" on all boundaries
      HeatFluxType = ConvectiveHeatFlux
      h = 10
      Text_src = root.comp1.ampr1.T_amb
    sar1: SurfaceToAmbientRadiation on all boundaries
      epsilon_rad_mat = userdef
      epsilon_rad = 0.8
      Tamb_src = root.comp1.ampr1.T_amb

Mesh
  mesh1 "Mesh 1" (physics-controlled)

Studies
  std1 "Study 1"
    time: Transient "Time Dependent" | tunit = min; tlist = {0, 30, 60, 90, 120, 150, 180}; usertol = on; rtol = 1e-5

Solver configurations
  sol1 "Solution 1" (study std1)
    v1: Variables "Dependent Variables 1"
    t1: Time "Time-Dependent Solver 1"
      tlist = {0, 30, 60, 90, 120, 150, 180}
      atolmethod = {comp1_T, global}
      atolvaluemethod = {comp1_T, factor}
      atol = {comp1_T, 1e-3}
      maxorder = 2
      estrat = exclude
      fc1: FullyCoupled
        linsolver = d1
        damp = 0.9
        jtech = once
        stabacc = aacc
        aaccdim = 5
        aaccmix = 0.9
        aaccdelay = 1
      d1: Direct "Direct, heat transfer variables (ht)" | linsolver = pardiso; pivotperturb = 1.0E-13

Datasets
  dset1: Solution | solution = sol1

Derived values
  gev1: EvalGlobal "Reference temperature"
    data = dset1
    table = tbl1
    expr = Tref(t)
    unit = degC
    descr = Reference temperature
  pev1: EvalPoint "Temperature" on points 3 | data = dset1; table = tbl1; expr = T; unit = degC; descr = Temperature
  pev2: EvalPoint "Absolute and relative error" on points 3
    data = dset1
    table = tbl2
    expr = {abs(T-Tref(t)), abs(T-Tref(t))/(Tref(t)-273.15[K])}
    unit = {K, %}
    descr = {Absolute error, Relative error}

Tables
  tbl1: Table
    // Reference temperature
    Time (min) | Reference temperature (degC) | Temperature (degC), Point: 3
    0 | 0 | 3.57637e-07
    30 | 36.9 | 34.2486
    60 | 137.4 | 134.519
    90 | 244.6 | 243.739
    120 | 361.1 | 364.297
    150 | 466.2 | 470.96
    180 | 554.8 | 560.774
  tbl2: Table
    // Absolute and relative error
    Time (min) | Absolute error (K), Point: 3 | Relative error (%), Point: 3
    30 | 2.65135 | 7.18524
    60 | 2.88142 | 2.0971
    90 | 0.861437 | 0.352182
    120 | 3.19703 | 0.885358
    150 | 4.76026 | 1.02108
    180 | 5.97365 | 1.07672

Plots
  pg1: PlotGroup2D "Temperature (ht)" | data = dset1
    surf1: Surface | expr = T; unit = degC
  pg2: PlotGroup1D "Temperature" | data = none; title = Temperature evolution comparison; ylabel = Temperature (°C)
    tblp1: Table "Table Graph 1" | table = tbl1